// COMSOL Multiphysics 6.4.0.429 model "PMOS.mph"
// Outline of the model tree

Parameters
  Vd = -10[mV]  // Drain voltage
  Vg = -2[V]  // Gate voltage

Geometry
  geom1 "Geometry 1" (2D axisymmetric, length unit µm)
    r1: Rectangle | size = {3, 0.7}
    pol1: Polygon
      type = closed
      source = table
      table = {{0, 0.67}, {0, 0.7}, {0.5, 0.7}, {0.7, 0.7}, {2.3, 0.7}, {2.5, 0.7}, {3, 0.7}, {3, 0.67}}
    fin: Finalize "Form Union" | symmetriccoord = 8
    mce1: MeshControlEdges | input = fin(1) boundaries 4

Materials
  mat1: Common "Si - Silicon" on all domains
    def: def "Basic"
      relpermittivity = 11.7
      thermalconductivity = 131[W/(m*K)]
      density = 2329[kg/m^3]
      heatcapacity = 700[J/(kg*K)]
    AroraMobilityModel: AroraMobilityModel
      mun0_ref_arora = 1252[cm^2/(V*s)]
      mup0_ref_arora = 407[cm^2/(V*s)]
      mun_min_ref_arora = 88[cm^2/(V*s)]
      mup_min_ref_arora = 54.3[cm^2/(V*s)]
      Nn0_ref_arora = 1.26e17[1/cm^3]
      Np0_ref_arora = 2.35e17[1/cm^3]
      alpha0_arora = 0.88
      beta1_arora = -0.57
      beta2_arora = -2.33
      beta3_arora = -2.33
      beta4_arora = -0.146
      Tref_arora = 300[K]
    PowerLawMobilityModel: PowerLawMobilityModel
      mun0_pl = 1448[cm^2/(V*s)]
      mup0_pl = 473[cm^2/(V*s)]
      alphan_pl = 2.33
      alphap_pl = 2.23
      Tref_pl = 300[K]
    Auger: Auger "Auger recombination"
      Cn = 2.8e-31[cm^6/s]
      Cp = 9.9e-32[cm^6/s]
    Direct: Direct "Direct recombination"
      C = 0[cm^3/s]
    SRH: SRH "Shockley–Read–Hall recombination"
      taun = 10[us]
      taup = 10[us]
    FletcherMobilityModel: FletcherMobilityModel
      F1_fl = 1.04e21[1/(cm^1*V*s)]
      F2_fl = 7.45e13[1/cm^2]
      Tref_fl = 300[K]
    CaugheyThomasMobilityModel: CaugheyThomasMobilityModel
      alphan0_ct = 1.11
      alphap0_ct = 1.21
      vn0_ct = 1e7[cm/s]
      vp0_ct = 8.37e6[cm/s]
      betan1_ct = 0.66
      betap1_ct = 0.17
      betan2_ct = -0.87
      betap2_ct = -0.52
      Tref_ct = 300[K]
    SemicondMaterial: SemicondMaterial "Semiconductor material"
      Eg0 = 1.12[V]
      chi0 = 4.05[V]
      Nv = (T/300[K])^(3/2)*1.04e19[1/cm^3]
      Nc = (T/300[K])^(3/2)*2.8e19[1/cm^3]
      mun = 1450[cm^2/(V*s)]
      mup = 500[cm^2/(V*s)]
    LombardiSurfaceMobilityModel: LombardiSurfaceMobilityModel
      deltan_ls = 5.82e14[V/s]
      deltap_ls = 2.05e14[V/s]
      mun1_ls = 4.75e7[cm^2/(V*s)]
      mup1_ls = 9.93e7[cm^2/(V*s)]
      mun2_ls = 1.74e5[cm^2/(V*s)]
      mup2_ls = 8.84e5[cm^2/(V*s)]
      alphan_ls = 0.125
      alphap_ls = 0.0317
      Tref_ls = 1[K]
      Eref_ls = 1[V/cm]
      Nref_ls = 1[1/cm^3]
    ImpactIonization: ImpactIonization
      an = 0.426[1/V]
      ap = 0.243[1/V]
      bn = 4.81E5[V/cm]
      bp = 6.53E5[V/cm]
      cnii = 3.05E-4[1/K]
      cpii = 5.35E-4[1/K]
      dn = 6.86E-4[1/K]
      dp = 5.67E-4[1/K]
    SlotboomModel: SlotboomModel
      Eref_sb = 0.00692[V]
      Nref_sb = 1.3e17[1/cm^3]
      alpha_sb = 0.5
    JainRoulstonModel: JainRoulstonModel
      An_jr = 3.5e-8[V]
      Bn_jr = 0[V]
      Cn_jr = 0[V]
      Ap_jr = 3.5e-8[V]
      Bp_jr = 0[V]
      Cp_jr = 0[V]
      Nref_jr = 1[1/cm^3]
      alpha_jr = 0.5
    KlaassenUnifiedMobilityModel: KlaassenUnifiedMobilityModel
      T_ref_kl = 300[K]
      mu_e_max_kl = 1414.0[cm^2/V/s]
      mu_h_max_kl = 470.5[cm^2/V/s]
      mu_e_min_kl = 68.5[cm^2/V/s]
      mu_h_min_kl = 44.9[cm^2/V/s]
      theta_e_kl = 2.285
      theta_h_kl = 2.247
      alpha_e_1_kl = 0.711
      alpha_h_1_kl = 0.719
      N_ref_e_1_kl = 9.20e16[cm^-3]
      N_ref_h_1_kl = 2.23e17[cm^-3]
      c_D_kl = 0.21
      c_A_kl = 0.50
      N_ref_D_kl = 4.0e20[cm^-3]
      N_ref_A_kl = 7.2e20[cm^-3]
      f_BH_kl = 3.828
      f_CW_kl = 2.459
      N_BH_kl = 1.36e20[cm^-3]
      P_CW_kl = 3.97e13
      s_1_kl = 0.89233
      s_2_kl = 0.41372
      s_3_kl = 0.19778
      s_4_kl = 0.28227
      s_5_kl = 0.005978
      s_6_kl = 1.80618
      s_7_kl = 0.72169
      r_1_kl = 0.7643
      r_2_kl = 2.2999
      r_3_kl = 6.5502
      r_4_kl = 2.3670
      r_5_kl = -0.01552
      r_6_kl = 0.6478
      m_e_kl = me_const
      m_h_kl = 1.258*me_const

Physics
  semi: Semiconductor on all domains
    dependent variable V
    ModelProperties.CarrierStatistics = FermiDirac
    smm1: SemiconductorMaterialModel (default) | BandGapNarrowing = jain
    axi1: AxialSymmetry (default)
    ins1: Insulation (default)
    zc1: ZeroCharge (default)
    ii1: InsulatorInterface (default)
    cont1: Continuity "Continuity/Heterojunction 1" (default)
    init1: init "Initial Values 1" (default)
    adm1: AnalyticDopingModel on all domains | impurityType = donor; NAc = 1e17[1/cm^3]; NDc = 1e17[1/cm^3]
    adm2: AnalyticDopingModel on all domains
      impurityDistribution = box
      impurityType = acceptor
      NAc = 1e20[1/cm^3]
      NDc = 1e20[1/cm^3]
      rb = {0[um], 0, 0.6[um]}
      jda = {0.2[um], 0, 0.25[um]}
      AsymmetricJunctionDepth = 1
      jwidth = 0.6[um]
      jheight = 0.1[um]
      Nb_src = root.comp1.semi.adm1.NDc
    adm3: AnalyticDopingModel on all domains
      impurityDistribution = box
      impurityType = acceptor
      NAc = 1e20[1/cm^3]
      NDc = 1e20[1/cm^3]
      rb = {2.4[um], 0, 0.6[um]}
      jda = {0.2[um], 0, 0.25[um]}
      AsymmetricJunctionDepth = 1
      jwidth = 0.6[um]
      jheight = 0.1[um]
      Nb_src = root.comp1.semi.adm1.NDc
    mc1: MetalContact on boundaries 3
    mc2: MetalContact on boundaries 7 | V0 = Vd
    mc3: MetalContact on boundaries 2
    gc1: GateContact "Thin Insulator Gate 1" on boundaries 5 | V0 = Vg; epsilon_ins = 4.5; d_ins = 30[nm]
    tar1: TrapAssistedRecombination on all domains

Mesh
  mesh1 "Mesh 1"
    size: MeshSizeDefault | hgrad = 1.05; custom = on
    edg1: Edge on boundaries 3-7 | smoothcontrol = off
      size1: Size on boundaries 3-7 | table = semi; hmax = 0.03; custom = on
    map1: Map "Mapped 1" on domains 2 | adjustedgdistr = on; smoothcontrol = off
      dis1: Distribution on no boundaries
        type = predefined
        reverse = on
        elemcount = 8
        elemratio = 9
        growthrate = exponential
    ftri1: FreeTri "Free Triangular 1" on remaining entities | smoothcontrol = off

Studies
  std1 "Study 1"
    stat: Stationary
      useparam = on
      sweeptype = filled
      pname = {Vd, Vg}
      plistarr = {-0.01, range(0,-0.2,-1.4) -2 -3 -4}
      punit = {V, V}
  std2 "Study 2"
    stat: Stationary
      useinitsol = on
      initmethod = sol
      initstudy = std1
      useparam = on
      sweeptype = filled
      pname = {Vg, Vd}
      plistarr = {range(-2,-1,-4), range(0,-0.25,-1.5) -2 -3 -4 -5}
      punit = {V, V}
      preusesol = auto

Solver configurations
  sol1 "Solution 1" (study std1)
    v1: Variables "Dependent Variables 1"
    s1: Stationary "Stationary Solver 1"
      p1: Parametric
      fc1: FullyCoupled
      d1: Direct
  sol2 "Solution 2" (study std2)
    // same settings as sol1

Datasets
  dset1: Solution | solution = sol1
  dset2: Solution | solution = sol2
  rev1: Revolve2D "Revolution 2D 1" | data = dset2; revangle = 270

Plots
  pg1: PlotGroup2D "Signed Dopant Concentration" | data = dset1
    surf1: Surface | expr = semi.Nd-semi.Na; unit = 1/cm^3
  pg2: PlotGroup1D "Id vs. Vg (Vd=-10mV)" | data = dset1
    glob1: Global | expr = semi.I0_2; unit = uA; descr = Terminal current
  pg3: PlotGroup2D "Electron Concentration (semi)" | data = dset2
    surf1: Surface | expr = semi.N; unit = 1/cm^3
  pg4: PlotGroup2D "Hole Concentration (semi)" | data = dset2
    surf1: Surface | expr = semi.P; unit = 1/cm^3
  pg5: PlotGroup2D "Electric Potential (semi)" | data = dset2
    surf1: Surface | expr = V
  pg6: PlotGroup3D "Electron Concentration (semi) 1" | data = rev1
    surf1: Surface | expr = semi.N; unit = 1/cm^3
  pg7: PlotGroup3D "Hole Concentration (semi) 1" | data = rev1
    surf1: Surface | expr = semi.P; unit = 1/cm^3
  pg8: PlotGroup3D "Electric Potential (semi) 1" | data = rev1
    surf1: Surface | expr = V
  pg9: PlotGroup2D "Net Dopant Concentration (semi)"
    data = dset2
    title = Net Dopant Concentration \vert N<sub>d</sub> - N<sub>a</sub>\vert: P-type (Red), N-type (Blue)
    surf2: Surface "P-Type" | expr = semi.Nnetdop; unit = 1/cm^3
      filt1: Filter | expr = semi.Na-semi.Nd > 1[1/cm^3]; useder = on
    surf1: Surface "N-Type" | expr = semi.Nnetdop; unit = 1/cm^3
      filt1: Filter | expr = semi.Nd-semi.Na > 1[1/cm^3]; useder = on
  pg10: PlotGroup1D "Id vs. Vd" | data = dset2
    glob1: Global | expr = semi.I0_2; unit = uA; descr = Terminal current

Exports
  data1: Data | data = dset1; filename = C:\Users\thula\OneDrive\Documents\COMSOL\Transfer characteristics-PMOS.CSV
  data2: Data | data = dset2; filename = C:\Users\thula\OneDrive\Documents\COMSOL\Output characteristics-PMOS.CSV